# OpenSim document version 40000
MarkerSet:
  Marker C7: torso (-0.08036471 0.4199804 0.002517647)
  Marker CLAV: torso (0.04628627 0.3855137 0.0247451)
  Marker LANK: tibia_l (-0.01756078 -0.3844314 -0.04785098)
  Marker LASI: pelvis (0.02738431 0.009941176 -0.1286471)
  Marker LBAK: torso (0.04526667 0.3840863 -0.02407059)
  Marker LBCEP: humerus_l (0.01000654 -0.2737821 -0.04112528)
  Marker LBHD: torso (-0.08010588 0.4192745 0.003843137)
  Marker LBUM: pelvis (0.02718824 0.01033333 -0.1289216)
  Marker LBUST: torso (0.04644314 0.3859529 -0.0241098)
  Marker LCHEECK: torso (-0.08091373 0.4205373 0.003160784)
  Marker LELB: humerus_l (0.0107281 -0.2734527 -0.0424743)
  Marker LELBIN: humerus_l (0.004676014 -0.2783072 0.04688275)
  Marker LFHD: torso (-0.07977647 0.4200588 0.00267451)
  Marker LFIN: radius_l (-0.0347685 -0.2261409 -0.03558554)
  Marker LFRM: radius_l (-0.03510575 -0.2266978 -0.03530319)
  Marker LFTHIIN: femur_l (0.08067843 -0.3247647 -0.004445098)
  Marker LHEE: calcn_l (-0.02947843 0.01437223 0.009776471)
  Marker LIWR: radius_l (-0.03497242 -0.227239 -0.03666789)
  Marker LKNE: femur_l (0.007635294 -0.4047647 -0.05447843)
  Marker LKNI: femur_l (0.01180392 -0.4010039 0.05531765)
  Marker LMT1: calcn_l (0.1797728 0.01833113 -0.0007574532)
  Marker LMT5: calcn_l (0.1362128 0.00187169 -0.06178114)
  Marker LNWST: torso (0.0460902 0.3858824 -0.02552941)
  Marker LOWR: radius_l (-0.0408616 -0.2260223 0.005384183)
  Marker LPSI: pelvis (-0.1532588 0.0242902 -0.05066275)
  Marker LRSTBEEF: calcn_l (-0.02926667 0.01445066 0.009392157)
  Marker LSCAP: torso (-5.882353e-5 0.417251 -0.1428824)
  Marker LSHN: tibia_l (0.01277059 -0.3204353 -0.05962745)
  Marker LSHO: torso (-0.0008117647 0.4173451 -0.1414078)
  Marker LTHI: femur_l (0.07939216 -0.3248902 -0.005033333)
  Marker LTHILO: femur_l (0.08090588 -0.324702 -0.0049)
  Marker LTHMB: radius_l (-0.0356234 -0.2263056 -0.03561691)
  Marker LTOE: calcn_l (0.1804081 0.01826839 -0.001204512)
  Marker MBLLY: torso (0.0468902 0.384549 0.02472157)
  Marker RANK: tibia_r (-0.0178984 -0.3860322 0.04677234)
  Marker RASI: pelvis (0.0280902 0.009470588 0.1275961)
  Marker RBAK: torso (0.04596471 0.3851922 0.02530196)
  Marker RBCEP: humerus_r (0.009512417 -0.2739782 0.04090567)
  Marker RBHD: torso (-0.08043529 0.420898 0.002658824)
  Marker RBSH: torso (0.04633333 0.3850118 0.02413333)
  Marker RBUM: pelvis (0.0272902 0.01032549 0.1270627)
  Marker RBUST: torso (0.04634118 0.3855294 0.02417255)
  Marker RCHEECK: torso (-0.07946275 0.4204039 0.003192157)
  Marker RELB: humerus_r (0.009959476 -0.2728958 0.0412743)
  Marker RELBIN: humerus_r (0.005287779 -0.2775386 -0.0462004)
  Marker RFHD: torso (-0.08072549 0.4204039 0.00345098)
  Marker RFIN: radius_r (-0.02942486 -0.224796 0.03411328)
  Marker RFRM2: radius_r (-0.02959741 -0.225094 0.03412112)
  Marker RFTHI: femur_r (0.07998824 -0.3244353 0.004476471)
  Marker RFTHIIN: femur_r (0.07921176 -0.3239882 0.004766667)
  Marker RHEE: calcn_r (-0.03149875 0.01507942 -0.01090676)
  Marker RIWR: radius_r (-0.02926015 -0.2251725 0.03454465)
  Marker RKNE: femur_r (0.007298039 -0.4039882 0.05599216)
  Marker RKNI: femur_r (0.01022745 -0.4006118 -0.05534118)
  Marker RMT1: calcn_r (0.1803768 0.01733505 0.0005300022)
  Marker RMT5: calcn_r (0.1349658 0.0008599256 0.06159291)
  Marker RNWST: torso (0.04656863 0.3851529 0.02580392)
  Marker ROWR: radius_r (-0.02923473 -0.2259992 -0.01121117)
  Marker RPSI: pelvis (-0.1532118 0.02520784 0.04972941)
  Marker RRSTBEEF: calcn_r (-0.03180464 0.01489118 -0.01044401)
  Marker RSHO: torso (-0.0009529412 0.4187647 0.1429059)
  Marker RTHI: femur_r (0.08046667 -0.3237922 0.004170588)
  Marker RTHMB: radius_r (-0.03064054 -0.2254705 0.0338074)
  Marker RTIB: tibia_r (0.01114902 -0.2327216 0.07476471)
  Marker RTOE: calcn_r (0.1796395 0.01758604 0.00100059)
  Marker STRN: torso (0.0454549 0.3848 0.02401569)
  Marker T8: torso (-0.081 0.4192196 0.003913725)
