# OpenSim document version 40000
InverseKinematicsTool ssm67:
  constraint_weight: Inf
  accuracy: 1e-5
  report_errors: true
  report_marker_locations: false
  IKTaskSet:
    IKMarkerTask C7: apply=true weight=5
    IKMarkerTask CLAV: apply=true weight=5
    IKMarkerTask LANK: apply=true weight=5
    IKMarkerTask LASI: apply=true weight=25
    IKMarkerTask LBAK: apply=true weight=5
    IKMarkerTask LBCEP: apply=true weight=5
    IKMarkerTask LBHD: apply=true weight=5
    IKMarkerTask LBUM: apply=true weight=25
    IKMarkerTask LBUST: apply=true weight=5
    IKMarkerTask LCHEECK: apply=true weight=5
    IKMarkerTask LELB: apply=true weight=5
    IKMarkerTask LELBIN: apply=true weight=5
    IKMarkerTask LFHD: apply=true weight=5
    IKMarkerTask LFIN: apply=true weight=5
    IKMarkerTask LFRM: apply=true weight=5
    IKMarkerTask LFTHIIN: apply=true weight=5
    IKMarkerTask LHEE: apply=true weight=5
    IKMarkerTask LIWR: apply=true weight=5
    IKMarkerTask LKNE: apply=true weight=5
    IKMarkerTask LKNI: apply=true weight=5
    IKMarkerTask LMT1: apply=true weight=5
    IKMarkerTask LMT5: apply=true weight=5
    IKMarkerTask LNWST: apply=true weight=5
    IKMarkerTask LOWR: apply=true weight=5
    IKMarkerTask LPSI: apply=true weight=25
    IKMarkerTask LRSTBEEF: apply=true weight=5
    IKMarkerTask LSCAP: apply=true weight=5
    IKMarkerTask LSHN: apply=true weight=5
    IKMarkerTask LSHO: apply=true weight=5
    IKMarkerTask LTHI: apply=true weight=5
    IKMarkerTask LTHILO: apply=true weight=5
    IKMarkerTask LTHMB: apply=true weight=5
    IKMarkerTask LTOE: apply=true weight=5
    IKMarkerTask MBLLY: apply=true weight=5
    IKMarkerTask RANK: apply=true weight=5
    IKMarkerTask RASI: apply=true weight=25
    IKMarkerTask RBAK: apply=true weight=5
    IKMarkerTask RBCEP: apply=true weight=5
    IKMarkerTask RBHD: apply=true weight=5
    IKMarkerTask RBSH: apply=true weight=5
    IKMarkerTask RBUM: apply=true weight=25
    IKMarkerTask RBUST: apply=true weight=5
    IKMarkerTask RCHEECK: apply=true weight=5
    IKMarkerTask RELB: apply=true weight=5
    IKMarkerTask RELBIN: apply=true weight=5
    IKMarkerTask RFHD: apply=true weight=5
    IKMarkerTask RFIN: apply=true weight=5
    IKMarkerTask RFRM2: apply=true weight=5
    IKMarkerTask RFTHI: apply=true weight=5
    IKMarkerTask RFTHIIN: apply=true weight=5
    IKMarkerTask RHEE: apply=true weight=5
    IKMarkerTask RIWR: apply=true weight=5
    IKMarkerTask RKNE: apply=true weight=5
    IKMarkerTask RKNI: apply=true weight=5
    IKMarkerTask RMT1: apply=true weight=5
    IKMarkerTask RMT5: apply=true weight=5
    IKMarkerTask RNWST: apply=true weight=5
    IKMarkerTask ROWR: apply=true weight=5
    IKMarkerTask RPSI: apply=true weight=25
    IKMarkerTask RRSTBEEF: apply=true weight=5
    IKMarkerTask RSHO: apply=true weight=5
    IKMarkerTask RTHI: apply=true weight=5
    IKMarkerTask RTHMB: apply=true weight=5
    IKMarkerTask RTIB: apply=true weight=5
    IKMarkerTask RTOE: apply=true weight=5
    IKMarkerTask STRN: apply=true weight=5
    IKMarkerTask T8: apply=true weight=5
